Формулы
Дано
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N := 27
Q1 := (1 + 0.1*N)*10^-4 = 0.00037
Q2 := (120 - N)*10^-5 = 0.00093
l1 := 0.2 + 0.01*N = 0.47
δ(p, D, σ) := p*D/σ
l2 := 2 + 0.1*N = 4.7
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l3 := 2.5 + 0.1*N = 5.2
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l4 := 3 + 0.1*N = 5.7
l5 := 3.5 + 0.1*N = 6.2
l6 := 4 + 0.1*N = 6.7
l7 := 5 + 0.1*N = 7.7
Км := 1 + 0.01*N = 1.27
Рц := 1.3*10^7 - 10^5*N = 10300000
Ргм := 3*10^6 + 1.2*N*10^5 = 6240000
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Решение
D(Q, Vmax) := 2*sqrt(Q/(π*Vmax))
D1 := D(Q1 + Q2, 1.2) = 0.0371395
p1 := Рц = 10300000
D2 := D(Q1 + Q2, 8) = 0.0143841
p2 := □  # error: Пустой местозаполнитель.
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p3 := □  # error: Пустой местозаполнитель.
D3 := D(Q1, 6) = 0.00886095
p4 := □  # error: Пустой местозаполнитель.
D4 := D(Км*Q1, 6) = 0.00998578
p5 := □  # error: Пустой местозаполнитель.
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p6 := □  # error: Пустой местозаполнитель.
D5 := D(Q2, 5) = 0.015389
p7 := □
D6 := D(Q2, 5) = 0.015389
D7 := D(Q1*Км + Q2, 2)
